// SBML level 3 version 2

model antibiotic_linear_growth_hill_killing_model()
  // model units - time: hour

  // Compartments:
  compartment central = 1 liter;

  // Species:
  species drug in central = 0;  // substance in mg

  // Parameters:
  bacterial_count = 1 cfu_per_ml;
  concentration_e50 = 1 mg_per_liter;
  elimination_rate = 1 per_hour;
  gamma = 1 dimensionless;
  growth_rate = 1 per_hour;
  kappa = 1 per_hour;

  // Rate rules:
  bacterial_count' = (growth_rate - kappa*(drug^gamma/(drug^gamma + concentration_e50^gamma)))*bacterial_count;

  // Reactions:
  central_reaction: drug => ; central*elimination_rate*drug;

  // Unit definitions:
  unit cfu_per_ml = item / liter;
  unit mg_per_liter = 1e-3 gram / liter;
  unit hour = 3600 second;
  unit mg = 1e-3 gram;
  unit per_hour = 1 / (3600 second);
end
